// SBML level 2 version 3

model Trypanosoma_brucei_procyclic_form_glucose_metabolism()

  // Compartments:
  compartment glycosome = 1;
  compartment mitochondrion = 1;
  compartment cytosol = 1;

  // Species:
  substanceOnly species AcetylCoa_m in mitochondrion = 0;
  substanceOnly species Fumarate_m in mitochondrion = 0;
  substanceOnly species Acetate_m in mitochondrion = 0;
  substanceOnly species NADH_g in glycosome = 2000;
  substanceOnly species Succinate_m in mitochondrion = 0;
  substanceOnly species NADPH in cytosol = 2000;
  substanceOnly species NADPplus in cytosol = 2000;
  substanceOnly species Pyruvate in cytosol = 0;
  substanceOnly species Succinate_g in glycosome = 0;
  substanceOnly species Fumarate_g in glycosome = 0;
  substanceOnly species Malate_g in glycosome = 0;
  substanceOnly species Oxac_g in glycosome = 0;
  substanceOnly species PEP in cytosol = 0;
  substanceOnly species ATP in cytosol = 2000;
  substanceOnly species ATP_g in glycosome = 2000;
  substanceOnly species ADP in cytosol = 4000;
  substanceOnly species PGA in cytosol = 0;
  substanceOnly species ADP_g in glycosome = 2000;
  substanceOnly species NADplus_g in glycosome = 2000;
  substanceOnly species BPGA_g in glycosome = 0;
  substanceOnly species GAP_g in glycosome = 0;
  substanceOnly species DHAP_g in glycosome = 0;
  substanceOnly species FBP_g in glycosome = 0;
  substanceOnly species F6P_g in glycosome = 0;
  substanceOnly species G6P_g in glycosome = 0;
  substanceOnly species Glucose_g in glycosome = 1000;

  // Reactions:
  reaction_18: Malate_g => Fumarate_m; 41.93;
  reaction_12: Pyruvate => AcetylCoa_m; 100;
  reaction_13: AcetylCoa_m => Acetate_m; 100;
  reaction_19: Fumarate_m => Succinate_m; 100;
  reaction_20: NADPplus + Malate_g => NADPH + Pyruvate; 2.26;
  reaction_10: ADP + PEP => ATP + Pyruvate; 7.66;
  reaction_11: ADP_g + PEP => ATP_g + Pyruvate; 0.55;
  reaction_17: NADH_g + Fumarate_g => NADplus_g + Succinate_g; 100;
  reaction_16: Malate_g => Fumarate_g; 55.81;
  reaction_15: NADH_g + Oxac_g => NADplus_g + Malate_g; 100;
  reaction_14: ADP_g + PEP => ATP_g + Oxac_g; 91.78;
  reaction_8_9: PGA => PEP; 100;
  reaction_7: ADP + BPGA_g => ATP + PGA; 100;
  reaction_6: NADplus_g + GAP_g => NADH_g + BPGA_g; 100;
  reaction_5: DHAP_g => GAP_g; 100;
  reaction_4: FBP_g => GAP_g + DHAP_g; 100;
  reaction_3: ATP_g + F6P_g => ADP_g + FBP_g; 100;
  reaction_2: G6P_g => F6P_g; 50;
  reaction_1: ATP_g + Glucose_g => ADP_g + G6P_g; 100;
end
