// SBML level 2 version 3

model petri_net_v17_spstochpn()

  // Compartments:
  compartment compartment = 1;

  // Species:
  substanceOnly species AcetylCoa in compartment = 0;
  substanceOnly species Malate_mito in compartment = 0;
  substanceOnly species Acetate in compartment = 0;
  substanceOnly species NADH in compartment = 2000;
  substanceOnly species Succinate_2 in compartment = 0;
  substanceOnly species NADPH in compartment = 2000;
  substanceOnly species NADPplus in compartment = 2000;
  substanceOnly species Pyruvate in compartment = 0;
  substanceOnly species Succinate_1 in compartment = 0;
  substanceOnly species Fumarate in compartment = 0;
  substanceOnly species Malate in compartment = 0;
  substanceOnly species Oxac in compartment = 0;
  substanceOnly species PEP in compartment = 0;
  substanceOnly species ATP_2 in compartment = 2000;
  substanceOnly species ATP in compartment = 2000;
  substanceOnly species ADP_2 in compartment = 4000;
  substanceOnly species PGA in compartment = 0;
  substanceOnly species ADP in compartment = 2000;
  substanceOnly species NADplus in compartment = 2000;
  substanceOnly species BPGA in compartment = 0;
  substanceOnly species Glycerol in compartment = 0;
  substanceOnly species Gly_3_P in compartment = 0;
  substanceOnly species G_3_P in compartment = 0;
  substanceOnly species DHAP in compartment = 0;
  substanceOnly species FBP in compartment = 0;
  substanceOnly species Fructose_6_phosphate in compartment = 0;
  substanceOnly species Glucose_6_phosphate in compartment = 0;
  substanceOnly species Dglucose in compartment = 1000;

  // Reactions:
  _transition_3: NADplus + Glucose_6_phosphate => G_3_P + NADH; 50;
  _transition_70: Malate => Malate_mito; 20;
  _transition_68: Pyruvate => AcetylCoa; 100;
  _transition_B: AcetylCoa => Acetate; 100;
  _transition_A: Malate_mito => Succinate_2; 100;
  _transition_22: NADPplus + Malate => NADPH + Pyruvate; 30;
  _transition_13: ADP_2 + PEP => ATP_2 + Pyruvate; 15;
  _transition_15: 2 ADP + PEP => 2 ATP + Pyruvate; 15;
  _transition_18: NADH + Fumarate => NADplus + Succinate_1; 100;
  _transition_17: Malate => Fumarate; 100;
  _transition_16: NADH + Oxac => NADplus + Malate; 100;
  _transition_14: ADP + PEP => ATP + Oxac; 70;
  _transition_11_12: PGA => PEP; 100;
  _transition_9: ADP_2 + BPGA => ATP_2 + PGA; 50;
  _transition_9: ADP + BPGA => PGA + ATP; 50;
  _transition_8: NADplus + G_3_P => NADH + BPGA; 100;
  _transition_7: ADP + Gly_3_P => ATP + Glycerol; 100;
  _transition_6: NADH + DHAP => NADplus + Gly_3_P; 0;
  _transition_5: DHAP => G_3_P; 100;
  _transition_4: FBP => G_3_P + DHAP; 100;
  _transition_3: ATP + Fructose_6_phosphate => ADP + FBP; 100;
  _transition_2: Glucose_6_phosphate => Fructose_6_phosphate; 50;
  _transition_1: ATP + Dglucose => ADP + Glucose_6_phosphate; 100;
end
