// SBML level 2 version 3

model unnamed1_spstochpn()

  // Compartments:
  compartment compartment = 1;

  // Species:
  substanceOnly species P_0 in compartment = 1000;
  substanceOnly species P_1 in compartment = 0;
  substanceOnly species P_2 in compartment = 0;
  substanceOnly species A in compartment = 0;
  substanceOnly species B in compartment = 0;
  substanceOnly species C in compartment = 0;
  substanceOnly species D in compartment = 0;

  // Reactions:
  T_0: P_0 => P_1; 80;
  T_1: P_0 => P_2; 20;
  T_2: P_1 => A; 30;
  T_3: P_1 => B; 70;
  T_4: P_2 => C; 50;
  T_5: P_2 => D; 50;
end
